AnyFolder MuscleContributions =
{

  AnyFolder &RightLegMuscles = Main.HumanModel.BodyModel.Right.Leg.Mus;

  AnyFolder &Pel = Main.HumanModel.BodyModel.Trunk.SegmentsLumbar.PelvisSeg;

  Pel =
  {
    AnyRefNode OrtholoadHip =
    {
      sRel = .Right.HipJoint.sRel;
      ARel = RotMat(sRel, .Right.HipJoint.sRel,.L5PelvisJntNode.sRel)*RotMat(-pi/2,x);
    };
  };


  AnyFolder &RightHip = Main.HumanModel.BodyModel.Trunk.SegmentsLumbar.PelvisSeg.Right.HipJoint;
  AnyFolder &Orthoload3Femur = Main.HumanModel.BodyModel.Right.Leg.Seg.Thigh.OrthoLoad3FemurCoordinate;


 // #if TLEM_VERSION == "2.0"


  AnyForceMomentMeasure2 MuscleGlutMaxSup =
  {
    AnyForceBase &ref1 = .RightLegMuscles.GluteusMaximusSuperior1;
    AnyForceBase &ref2 = .RightLegMuscles.GluteusMaximusSuperior2;
    AnyForceBase &ref3 = .RightLegMuscles.GluteusMaximusSuperior3;
    AnyForceBase &ref4 = .RightLegMuscles.GluteusMaximusSuperior4;
    AnyForceBase &ref5 = .RightLegMuscles.GluteusMaximusSuperior5;
    AnyForceBase &ref6 = .RightLegMuscles.GluteusMaximusSuperior6;


    #include "SingleMuscleContribution.any"

  };


  AnyForceMomentMeasure2 MuscleGlutMaxInf =
  {
    AnyForceBase &ref7 = .RightLegMuscles.GluteusMaximusInferior1;
    AnyForceBase &ref8 = .RightLegMuscles.GluteusMaximusInferior2;
    AnyForceBase &ref9 = .RightLegMuscles.GluteusMaximusInferior3;
    AnyForceBase &ref10 = .RightLegMuscles.GluteusMaximusInferior4;
    AnyForceBase &ref11 = .RightLegMuscles.GluteusMaximusInferior5;
    AnyForceBase &ref12 = .RightLegMuscles.GluteusMaximusInferior6;


    #include "SingleMuscleContribution.any"

  };


  // -------------------------------------------------------------------------------------------------------------------


  AnyForceMomentMeasure2 MuscleGlutMed =
  {
    AnyForceBase &ref1 = .RightLegMuscles.GluteusMediusAnterior1;
    AnyForceBase &ref2 = .RightLegMuscles.GluteusMediusAnterior2;
    AnyForceBase &ref3 = .RightLegMuscles.GluteusMediusAnterior3;
   AnyForceBase &ref4 = .RightLegMuscles.GluteusMediusAnterior4;
    AnyForceBase &ref5 = .RightLegMuscles.GluteusMediusAnterior5;
    AnyForceBase &ref6 = .RightLegMuscles.GluteusMediusAnterior6;


    AnyForceBase &ref7 = .RightLegMuscles.GluteusMediusPosterior1;
    AnyForceBase &ref8 = .RightLegMuscles.GluteusMediusPosterior2;
    AnyForceBase &ref9 = .RightLegMuscles.GluteusMediusPosterior3;
    AnyForceBase &ref10 = .RightLegMuscles.GluteusMediusPosterior4;
    AnyForceBase &ref11 = .RightLegMuscles.GluteusMediusPosterior5;
    AnyForceBase &ref12 = .RightLegMuscles.GluteusMediusPosterior6;


    #include "SingleMuscleContribution.any"


  };

    AnyForceMomentMeasure2 GluteusMediusAnterior1 =
  {
    AnyForceBase &ref2 = .RightLegMuscles.GluteusMediusAnterior1;
    #include "SingleMuscleContribution.any"
  };
  AnyForceMomentMeasure2 GluteusMediusAnterior2 =
  {
    AnyForceBase &ref2 = .RightLegMuscles.GluteusMediusAnterior2;
    #include "SingleMuscleContribution.any"
  };
    AnyForceMomentMeasure2 GluteusMediusAnterior3 =
  {
    AnyForceBase &ref2 = .RightLegMuscles.GluteusMediusAnterior3;
    #include "SingleMuscleContribution.any"
  };

  AnyForceMomentMeasure2 GluteusMediusAnterior4 =
  {
    AnyForceBase &ref2 = .RightLegMuscles.GluteusMediusAnterior4;
    #include "SingleMuscleContribution.any"
  };
    AnyForceMomentMeasure2 GluteusMediusAnterior5 =
  {
    AnyForceBase &ref2 = .RightLegMuscles.GluteusMediusAnterior5;
    #include "SingleMuscleContribution.any"
  };

  AnyForceMomentMeasure2 GluteusMediusAnterior6 =
  {
    AnyForceBase &ref2 = .RightLegMuscles.GluteusMediusAnterior6;
    #include "SingleMuscleContribution.any"
  };

  AnyForceMomentMeasure2 GluteusMediusPosterior1 =
  {
    AnyForceBase &ref2 = .RightLegMuscles.GluteusMediusPosterior1;
    #include "SingleMuscleContribution.any"
  };

  AnyForceMomentMeasure2 GluteusMediusPosterior2=
  {
    AnyForceBase &ref2 = .RightLegMuscles.GluteusMediusPosterior2;
    #include "SingleMuscleContribution.any"
  };

  AnyForceMomentMeasure2 GluteusMediusPosterior3=
  {
    AnyForceBase &ref2 = .RightLegMuscles.GluteusMediusPosterior3;
    #include "SingleMuscleContribution.any"
  };
    AnyForceMomentMeasure2 GluteusMediusPosterior4=
  {
    AnyForceBase &ref2 = .RightLegMuscles.GluteusMediusPosterior4;
    #include "SingleMuscleContribution.any"
  };

  AnyForceMomentMeasure2 GluteusMediusPosterior5=
  {
    AnyForceBase &ref2 = .RightLegMuscles.GluteusMediusPosterior5;
    #include "SingleMuscleContribution.any"
  };
    AnyForceMomentMeasure2 GluteusMediusPosterior6=
  {
    AnyForceBase &ref2 = .RightLegMuscles.GluteusMediusPosterior6;
    #include "SingleMuscleContribution.any"
  };


  // -------------------------------------------------------------------------------------------------------------------


  AnyForceMomentMeasure2 MuscleGlutMin =
  {
    AnyForceBase &ref1 = .RightLegMuscles.GluteusMinimusAnterior1;
//    AnyForceBase &ref2 = .RightLegMuscles.GluteusMinimusAnterior2;
    AnyForceBase &ref3 = .RightLegMuscles.GluteusMinimusMid1;
//    AnyForceBase &ref4 = .RightLegMuscles.GluteusMinimusMid2;
    AnyForceBase &ref5 = .RightLegMuscles.GluteusMinimusPosterior1;
//    AnyForceBase &ref6 = .RightLegMuscles.GluteusMinimusPosterior2;
//

    #include "SingleMuscleContribution.any"


  };


  AnyForceMomentMeasure2 MuscleRectFem =
  {
    AnyForceBase &ref1 = .RightLegMuscles.RectusFemoris1;
    AnyForceBase &ref2 = .RightLegMuscles.RectusFemoris2;


    #include "SingleMuscleContribution.any"


  };


  AnyForceMomentMeasure2 MuscleSemiTenMem =
  {
    AnyForceBase &ref1 = .RightLegMuscles.Semitendinosus1;
    AnyForceBase &ref2 = .RightLegMuscles.Semimembranosus1;
    AnyForceBase &ref3 = .RightLegMuscles.Semimembranosus2;
    AnyForceBase &ref4 = .RightLegMuscles.Semimembranosus3;


    #include "SingleMuscleContribution.any"

  };


  AnyForceMomentMeasure2 MuscleBicFemLong =
  {
    AnyForceBase &ref1 = .RightLegMuscles.BicepsFemorisCaputLongum1;


    #include "SingleMuscleContribution.any"


  };


  AnyForceMomentMeasure2 MuscleBicFemBrev =
  {
    AnyForceBase &ref1 = .RightLegMuscles.BicepsFemorisCaputBreve1;
    AnyForceBase &ref2 = .RightLegMuscles.BicepsFemorisCaputBreve2;
    AnyForceBase &ref3 = .RightLegMuscles.BicepsFemorisCaputBreve3;


    #include "SingleMuscleContribution.any"


  };


  AnyForceMomentMeasure2 MuscleSartorius =
  {
    AnyForceBase &ref1 = .RightLegMuscles.Sartorius1;


    #include "SingleMuscleContribution.any"

  };


  AnyForceMomentMeasure2 MuscleIliacus =
  {
    AnyForceBase &ref1 = .RightLegMuscles.IliacusLateralis1;
    AnyForceBase &ref2 = .RightLegMuscles.IliacusLateralis2;
    AnyForceBase &ref3 = .RightLegMuscles.IliacusMid1;
    AnyForceBase &ref4 = .RightLegMuscles.IliacusMid2;
    AnyForceBase &ref5 = .RightLegMuscles.IliacusMedialis1;
    AnyForceBase &ref6 = .RightLegMuscles.IliacusMedialis2;


   #include "SingleMuscleContribution.any"

  };


  AnyForceMomentMeasure2 MusclePsoas =
  {
//    AnyForceBase &ref1 = .RightLegMuscles.PsoasMajor1;
//    AnyForceBase &ref2 = .RightLegMuscles.PsoasMajor2;
//    AnyForceBase &ref3 = .RightLegMuscles.PsoasMajor3;
//    AnyForceBase &ref4 = .RightLegMuscles.PsoasMajor4;
//    AnyForceBase &ref5 = .RightLegMuscles.PsoasMajor5;
//
    AnyFolder &mus159= Main.HumanModel.BodyModel.Trunk.MusclesSpineRight.PsoasMajor.PMT12I_TM;
    AnyFolder &mus160= Main.HumanModel.BodyModel.Trunk.MusclesSpineRight.PsoasMajor.PML1I_TM;
    AnyFolder &mus161= Main.HumanModel.BodyModel.Trunk.MusclesSpineRight.PsoasMajor.PML1T_TM;
    AnyFolder &mus162= Main.HumanModel.BodyModel.Trunk.MusclesSpineRight.PsoasMajor.PML2I_TM;
    AnyFolder &mus163= Main.HumanModel.BodyModel.Trunk.MusclesSpineRight.PsoasMajor.PML2T_TM;
    AnyFolder &mus164= Main.HumanModel.BodyModel.Trunk.MusclesSpineRight.PsoasMajor.PML3I_TM;
    AnyFolder &mus165= Main.HumanModel.BodyModel.Trunk.MusclesSpineRight.PsoasMajor.PML3T_TM;
    AnyFolder &mus166= Main.HumanModel.BodyModel.Trunk.MusclesSpineRight.PsoasMajor.PML4I_TM;
    AnyFolder &mus167= Main.HumanModel.BodyModel.Trunk.MusclesSpineRight.PsoasMajor.PML4T_TM;
    AnyFolder &mus168= Main.HumanModel.BodyModel.Trunk.MusclesSpineRight.PsoasMajor.PML5_TM;
    AnyFolder &mus169= Main.HumanModel.BodyModel.Trunk.MusclesSpineRight.PsoasMajor.PML5T_TM;
//


    #include "SingleMuscleContribution.any"

  };


  AnyForceMomentMeasure2 MuscleTFL =
  {
    AnyForceBase &ref1 = .RightLegMuscles.TensorFasciaeLatae1;
    AnyForceBase &ref2 = .RightLegMuscles.TensorFasciaeLatae2;


    #include "SingleMuscleContribution.any"

  };


  AnyForceMomentMeasure2 MusclePiriformis =
  {
    AnyForceBase &ref1 = .RightLegMuscles.Piriformis1;


    #include "SingleMuscleContribution.any"
  };


  AnyForceMomentMeasure2 MuscleGracilis =
  {
    AnyForceBase &ref1 = .RightLegMuscles.Gracilis1;
    AnyForceBase &ref2 = .RightLegMuscles.Gracilis2;


    #include "SingleMuscleContribution.any"

  };


  AnyForceMomentMeasure2 MuscleAddLongus =
  {
    AnyForceBase &ref1 = .RightLegMuscles.AdductorLongus1;
    AnyForceBase &ref2 = .RightLegMuscles.AdductorLongus2;
    AnyForceBase &ref3 = .RightLegMuscles.AdductorLongus3;
    AnyForceBase &ref4 = .RightLegMuscles.AdductorLongus4;
    AnyForceBase &ref5 = .RightLegMuscles.AdductorLongus5;
    AnyForceBase &ref6 = .RightLegMuscles.AdductorLongus6;


    #include "SingleMuscleContribution.any"


  };


  AnyForceMomentMeasure2 MuscleAddMagnus =
  {
    AnyForceBase &ref1 = .RightLegMuscles.AdductorMagnusDistal1;
    AnyForceBase &ref2 = .RightLegMuscles.AdductorMagnusDistal2;
    AnyForceBase &ref3 = .RightLegMuscles.AdductorMagnusDistal3;

    AnyForceBase &ref4 = .RightLegMuscles.AdductorMagnusMid1;
    AnyForceBase &ref5 = .RightLegMuscles.AdductorMagnusMid2;
    AnyForceBase &ref6 = .RightLegMuscles.AdductorMagnusMid3;
    AnyForceBase &ref7 = .RightLegMuscles.AdductorMagnusMid4;
    AnyForceBase &ref8 = .RightLegMuscles.AdductorMagnusMid5;
    AnyForceBase &ref9 = .RightLegMuscles.AdductorMagnusMid6;

    AnyFolder &mus128  = .RightLegMuscles.AdductorMagnusProximal1;
    AnyFolder &mus129  = .RightLegMuscles.AdductorMagnusProximal2;
    AnyFolder &mus130  = .RightLegMuscles.AdductorMagnusProximal3;
    AnyFolder &mus131  = .RightLegMuscles.AdductorMagnusProximal4;


    #include "SingleMuscleContribution.any"

  };


  AnyForceMomentMeasure2 MuscleAddBrevis =
  {
    AnyForceBase &ref1 = .RightLegMuscles.AdductorBrevisProximal1;
    AnyForceBase &ref2 = .RightLegMuscles.AdductorBrevisProximal2;

    AnyForceBase &ref4 = .RightLegMuscles.AdductorBrevisMid1;
    AnyForceBase &ref5 = .RightLegMuscles.AdductorBrevisMid2;

    AnyForceBase &ref6 = .RightLegMuscles.AdductorBrevisDistal1;
    AnyForceBase &ref7 = .RightLegMuscles.AdductorBrevisDistal2;


    #include "SingleMuscleContribution.any"

  };


  AnyForceMomentMeasure2 MuscleGemellus =
  {
    AnyForceBase &ref1 = .RightLegMuscles.GemellusInferior1;
    AnyForceBase &ref2 = .RightLegMuscles.GemellusSuperior1;


    #include "SingleMuscleContribution.any"

  };


  AnyForceMomentMeasure2 MuscleObturators =
  {
    AnyForceBase &ref1 = .RightLegMuscles.ObturatorExternusSuperior1;
    AnyForceBase &ref2 = .RightLegMuscles.ObturatorExternusSuperior2;
    AnyForceBase &ref3 = .RightLegMuscles.ObturatorExternusSuperior3;

    AnyForceBase &ref4 = .RightLegMuscles.ObturatorExternusInferior1;
    AnyForceBase &ref5 = .RightLegMuscles.ObturatorExternusInferior2;


    AnyForceBase &ref6 = .RightLegMuscles.ObturatorInternus1;
    AnyForceBase &ref7 = .RightLegMuscles.ObturatorInternus2;
    AnyForceBase &ref8 = .RightLegMuscles.ObturatorInternus3;
    AnyForceBase &ref9 = .RightLegMuscles.ObturatorInternus4;
    AnyForceBase &ref10 = .RightLegMuscles.ObturatorInternus5;
    AnyForceBase &ref11 = .RightLegMuscles.ObturatorInternus6;


    #include "SingleMuscleContribution.any"

  };


  AnyForceMomentMeasure2 MusclePectineus =
  {
    AnyForceBase &ref1 = .RightLegMuscles.Pectineus1;
    AnyForceBase &ref2 = .RightLegMuscles.Pectineus2;
    AnyForceBase &ref3 = .RightLegMuscles.Pectineus3;
    AnyForceBase &ref4 = .RightLegMuscles.Pectineus4;


    #include "SingleMuscleContribution.any"

  };


  AnyForceMomentMeasure2 MusclePlantandPoplietus =
  {
    AnyForceBase &ref1 = .RightLegMuscles.Plantaris1;

    AnyForceBase &ref2 = .RightLegMuscles.Popliteus1;
    AnyForceBase &ref3 = .RightLegMuscles.Popliteus2;
    AnyForceBase &ref4 = .RightLegMuscles.Popliteus3;


    #include "SingleMuscleContribution.any"


  };


  AnyForceMomentMeasure2 MuscleQuadratus =
  {
    AnyForceBase &ref1 = .RightLegMuscles.QuadratusFemoris1;

    AnyForceBase &ref2 = .RightLegMuscles.QuadratusFemoris2;
    AnyForceBase &ref3 = .RightLegMuscles.QuadratusFemoris3;
    AnyForceBase &ref4 = .RightLegMuscles.QuadratusFemoris4;


    #include "SingleMuscleContribution.any"

  };


  AnyForceMomentMeasure2 MuscleSoleus =
  {
    AnyFolder &mus1  = .RightLegMuscles.SoleusMedialis1;
    AnyFolder &mus2  = .RightLegMuscles.SoleusMedialis2;
    AnyFolder &mus3  = .RightLegMuscles.SoleusMedialis3;
    AnyFolder &mus4  = .RightLegMuscles.SoleusLateralis1;
    AnyFolder &mus5  = .RightLegMuscles.SoleusLateralis2;
    AnyFolder &mus6  = .RightLegMuscles.SoleusLateralis3;

    #include "SingleMuscleContribution.any"

  };


  AnyForceMomentMeasure2 MuscleVast =
  {


    AnyFolder &mus39  = .RightLegMuscles.VastusLateralisInferior1;
    AnyFolder &mus40  = .RightLegMuscles.VastusLateralisInferior2;
    AnyFolder &mus41  = .RightLegMuscles.VastusLateralisInferior3;
    AnyFolder &mus42  = .RightLegMuscles.VastusLateralisInferior4;
    AnyFolder &mus43  = .RightLegMuscles.VastusLateralisInferior5;
    AnyFolder &mus44  = .RightLegMuscles.VastusLateralisInferior6;
    AnyFolder &mus45  = .RightLegMuscles.VastusLateralisSuperior1;
    AnyFolder &mus46  = .RightLegMuscles.VastusLateralisSuperior2;
    AnyFolder &mus47  = .RightLegMuscles.VastusMedialisInferior1;
    AnyFolder &mus48  = .RightLegMuscles.VastusMedialisInferior2;

    AnyFolder &mus49  = .RightLegMuscles.VastusMedialisMid1;
    AnyFolder &mus50  = .RightLegMuscles.VastusMedialisMid2;

    AnyFolder &mus51  = .RightLegMuscles.VastusMedialisSuperior1;
    AnyFolder &mus52  = .RightLegMuscles.VastusMedialisSuperior2;
    AnyFolder &mus53  = .RightLegMuscles.VastusMedialisSuperior3;
    AnyFolder &mus54  = .RightLegMuscles.VastusMedialisSuperior4;


    AnyFolder &mus57  = .RightLegMuscles.VastusIntermedius1;
    AnyFolder &mus58  = .RightLegMuscles.VastusIntermedius2;
    AnyFolder &mus59  = .RightLegMuscles.VastusIntermedius3;
    AnyFolder &mus60  = .RightLegMuscles.VastusIntermedius4;
    AnyFolder &mus61  = .RightLegMuscles.VastusIntermedius5;
    AnyFolder &mus62  = .RightLegMuscles.VastusIntermedius6;

    #include "SingleMuscleContribution.any"

  };

  //---------------- Summing up all muscle contributions ---------------------------

  AnyObjectPtrArray Objects = ObjSearchRecursive("Main.Studies.InverseDynamicStudy.MuscleContributions","Muscle*.Flocal");


  AnyFloat val = sum(Obj2Num(Objects)') + 0*MuscleVast.Fx + 0.001*{1,1,1};


  AnyVar W = Main.ModelSetup.SubjectSpecificData.Anthropometrics.BodyMass*9.81;

  AnyFloat TestMuscleContributions = val/W;


  //----------------- GRF component to HCF -----------------------------

  AnyMat33 M = Orthoload3Femur.Axes;

//  AnyMat33 M = {{1,0,0},{0,1,0},{0,0,1}};


  AnyFloat TestGRFComponent = Main.EnvironmentModel.ForcePlates.Plate2.CenterOfPressure.NetEffectMeasure.F*M/W;


  //------------------------ Weight of leg ----------------------------------------------

  AnyObjectPtrArray LegObjects = {&Main.HumanModel.BodyModel.Right.Leg.Seg.Talus.Mass, &Main.HumanModel.BodyModel.Right.Leg.Seg.Foot.Mass, &Main.HumanModel.BodyModel.Right.Leg.Seg.Shank.Mass, &Main.HumanModel.BodyModel.Right.Leg.Seg.Thigh.Mass, &Main.HumanModel.BodyModel.Right.Leg.Seg.Patella.Mass};//ObjSearchRecursive("Main.HumanModel.BodyModel.Right.Leg.Seg","*.Mass");


  AnyKinCoM RightLeg =
  {
    AnyFolder &leg = Main.HumanModel.BodyModel.Right.Leg.Seg;
  };


  AnyFloat leg_acc = RightLeg.Acc*M;
  AnyFloat gravity = Main.Studies.InverseDynamicStudy.Gravity*M;


  AnyFloat legmass = sum(Obj2Num(LegObjects))/W;


  AnyFloat TestSum = ((TestMuscleContributions + TestGRFComponent) + legmass*(gravity - leg_acc));


  //--------------------- HCF measured -----------------------------

  AnyForceMomentMeasure2 HCF =
  {

    AnyForceBase &ref = Main.HumanModel.BodyModel.Right.Leg.Jnt.Hip.Constraints.Reaction;

    AnyRefFrame &frame = .Orthoload3Femur;
    AnySeg &seg = Main.HumanModel.BodyModel.Trunk.SegmentsLumbar.PelvisSeg;

    AnyFloat Flocal = F * frame.Axes;

  };

  AnyFloat HipForces = HCF.Flocal/W;


  //-----------------------------------------------------------------------------------


  AnyObjectPtrArray Objects1 = ObjSearchRecursive("Main.Studies.InverseDynamicStudy.MuscleContributions","Muscle*.Mlocal");


  #include "StudyMuscleContributions_SumJointMoments.any"

  AnyForceMomentMeasure2 HipNetMomentMuscle = {

//    #include "SingleMuscleContribution.any"

    AnyRefNode &ref = .Orthoload3Femur;


    AnySeg &seg = Main.HumanModel.BodyModel.Right.Leg.Seg.Thigh;
    AnySeg &seg1 = Main.HumanModel.BodyModel.Right.Leg.Seg.Shank;
    AnySeg &seg2 = Main.HumanModel.BodyModel.Right.Leg.Seg.Patella;
    AnySeg &seg3 = Main.HumanModel.BodyModel.Right.Leg.Seg.Talus;
    AnySeg &seg4 = Main.HumanModel.BodyModel.Right.Leg.Seg.Foot;


    AnyFolder &mus63  = .RightLegMuscles.RectusFemoris1;
    AnyFolder &mus64  = .RightLegMuscles.RectusFemoris2;

    AnyFolder &mus65  = .RightLegMuscles.Semitendinosus1;
    AnyFolder &mus66  = .RightLegMuscles.Semimembranosus1;
    AnyFolder &mus67  = .RightLegMuscles.BicepsFemorisCaputLongum1;
    AnyFolder &mus68  = .RightLegMuscles.BicepsFemorisCaputBreve1;
    AnyFolder &mus69  = .RightLegMuscles.BicepsFemorisCaputBreve2;
    AnyFolder &mus170 = .RightLegMuscles.BicepsFemorisCaputBreve3;


    AnyFolder &mus70  = .RightLegMuscles.Sartorius1;

    AnyFolder &mus72  = .RightLegMuscles.IliacusLateralis1;
    AnyFolder &mus73  = .RightLegMuscles.IliacusLateralis2;

    AnyFolder &mus75  = .RightLegMuscles.IliacusMid1;
    AnyFolder &mus76  = .RightLegMuscles.IliacusMid2;

    AnyFolder &mus78  = .RightLegMuscles.IliacusMedialis1;
    AnyFolder &mus79  = .RightLegMuscles.IliacusMedialis2;


    AnyFolder &mus81a  = .RightLegMuscles.GluteusMinimusAnterior1;
//    AnyForceBase &mus8b1  = .RightLegMuscles.GluteusMinimusAnterior2;
    AnyForceBase &mus81c  = .RightLegMuscles.GluteusMinimusMid1;
//    AnyForceBase &mus81d  = .RightLegMuscles.GluteusMinimusMid2;
    AnyForceBase &mus81e  = .RightLegMuscles.GluteusMinimusPosterior1;
//    AnyForceBase &mus81f  = .RightLegMuscles.GluteusMinimusPosterior2;


    AnyFolder &mus84  = .RightLegMuscles.GluteusMediusAnterior1;
    AnyFolder &mus85  = .RightLegMuscles.GluteusMediusAnterior2;
    AnyFolder &mus86  = .RightLegMuscles.GluteusMediusAnterior3;
    AnyFolder &mus87  = .RightLegMuscles.GluteusMediusAnterior4;
    AnyFolder &mus88  = .RightLegMuscles.GluteusMediusAnterior5;
    AnyFolder &mus89  = .RightLegMuscles.GluteusMediusAnterior6;
    AnyFolder &mus90  = .RightLegMuscles.GluteusMediusPosterior1;
    AnyFolder &mus91  = .RightLegMuscles.GluteusMediusPosterior2;
    AnyFolder &mus92  = .RightLegMuscles.GluteusMediusPosterior3;
    AnyFolder &mus93  = .RightLegMuscles.GluteusMediusPosterior4;
    AnyFolder &mus94  = .RightLegMuscles.GluteusMediusPosterior5;
    AnyFolder &mus95  = .RightLegMuscles.GluteusMediusPosterior6;

    AnyFolder &mus96  = .RightLegMuscles.GluteusMaximusSuperior1;
    AnyFolder &mus97  = .RightLegMuscles.GluteusMaximusSuperior2;
    AnyFolder &mus98  = .RightLegMuscles.GluteusMaximusSuperior3;
    AnyFolder &mus99  = .RightLegMuscles.GluteusMaximusSuperior4;
    AnyFolder &mus100  = .RightLegMuscles.GluteusMaximusSuperior5;
    AnyFolder &mus101  = .RightLegMuscles.GluteusMaximusSuperior6;
    AnyFolder &mus102  = .RightLegMuscles.GluteusMaximusInferior1;
    AnyFolder &mus103  = .RightLegMuscles.GluteusMaximusInferior2;
    AnyFolder &mus104  = .RightLegMuscles.GluteusMaximusInferior3;
    AnyFolder &mus105  = .RightLegMuscles.GluteusMaximusInferior4;
    AnyFolder &mus106  = .RightLegMuscles.GluteusMaximusInferior5;
    AnyFolder &mus107  = .RightLegMuscles.GluteusMaximusInferior6;


    AnyFolder &mus108  = .RightLegMuscles.TensorFasciaeLatae1;
    AnyFolder &mus109  = .RightLegMuscles.TensorFasciaeLatae2;

    AnyFolder &mus110  = .RightLegMuscles.Piriformis1;

    AnyFolder &mus111  = .RightLegMuscles.Gracilis1;
    AnyFolder &mus112  = .RightLegMuscles.Gracilis2;

    AnyFolder &mus113  = .RightLegMuscles.AdductorLongus1;
    AnyFolder &mus114  = .RightLegMuscles.AdductorLongus2;
    AnyFolder &mus115  = .RightLegMuscles.AdductorLongus3;
    AnyFolder &mus116  = .RightLegMuscles.AdductorLongus4;
    AnyFolder &mus117  = .RightLegMuscles.AdductorLongus5;
    AnyFolder &mus118  = .RightLegMuscles.AdductorLongus6;

    AnyFolder &mus119  = .RightLegMuscles.AdductorMagnusDistal1;
    AnyFolder &mus120  = .RightLegMuscles.AdductorMagnusDistal2;
    AnyFolder &mus121  = .RightLegMuscles.AdductorMagnusDistal3;
    AnyFolder &mus122  = .RightLegMuscles.AdductorMagnusMid1;
    AnyFolder &mus123  = .RightLegMuscles.AdductorMagnusMid2;
    AnyFolder &mus124  = .RightLegMuscles.AdductorMagnusMid3;
    AnyFolder &mus125  = .RightLegMuscles.AdductorMagnusMid4;
    AnyFolder &mus126  = .RightLegMuscles.AdductorMagnusMid5;
    AnyFolder &mus127  = .RightLegMuscles.AdductorMagnusMid6;
    AnyFolder &mus128  = .RightLegMuscles.AdductorMagnusProximal1;
    AnyFolder &mus129  = .RightLegMuscles.AdductorMagnusProximal2;
    AnyFolder &mus130  = .RightLegMuscles.AdductorMagnusProximal3;
    AnyFolder &mus131  = .RightLegMuscles.AdductorMagnusProximal4;

    AnyFolder &mus132  = .RightLegMuscles.AdductorBrevisProximal1;
    AnyFolder &mus133  = .RightLegMuscles.AdductorBrevisProximal2;
    AnyFolder &mus134  = .RightLegMuscles.AdductorBrevisMid1;
    AnyFolder &mus135  = .RightLegMuscles.AdductorBrevisMid2;
    AnyFolder &mus136  = .RightLegMuscles.AdductorBrevisDistal1;
    AnyFolder &mus137  = .RightLegMuscles.AdductorBrevisDistal2;

    AnyFolder &mus138  = .RightLegMuscles.GemellusInferior1;
    AnyFolder &mus139  = .RightLegMuscles.GemellusSuperior1;

    AnyFolder &mus140  = .RightLegMuscles.ObturatorExternusSuperior1;
    AnyFolder &mus141  = .RightLegMuscles.ObturatorExternusSuperior2;
    AnyFolder &mus142  = .RightLegMuscles.ObturatorExternusSuperior3;
    AnyFolder &mus143  = .RightLegMuscles.ObturatorExternusInferior1;
    AnyFolder &mus144  = .RightLegMuscles.ObturatorExternusInferior2;

    AnyFolder &mus145a  = .RightLegMuscles.ObturatorInternus1;
    AnyFolder &mus145b  = .RightLegMuscles.ObturatorInternus2;
    AnyFolder &mus145c  = .RightLegMuscles.ObturatorInternus3;
    AnyFolder &mus145d  = .RightLegMuscles.ObturatorInternus4;
    AnyFolder &mus145e  = .RightLegMuscles.ObturatorInternus5;
    AnyFolder &mus145f  = .RightLegMuscles.ObturatorInternus6;

    AnyFolder &mus148  = .RightLegMuscles.Pectineus1;
    AnyFolder &mus149  = .RightLegMuscles.Pectineus2;
    AnyFolder &mus150  = .RightLegMuscles.Pectineus3;
    AnyFolder &mus151  = .RightLegMuscles.Pectineus4;

    AnyFolder &mus152  = .RightLegMuscles.Plantaris1;

    AnyFolder &mus153  = .RightLegMuscles.Popliteus1;
    AnyFolder &mus154  = .RightLegMuscles.Popliteus2;
    AnyFolder &mus154a  = .RightLegMuscles.Popliteus3;

    AnyFolder &mus155  = .RightLegMuscles.QuadratusFemoris1;
    AnyFolder &mus156  = .RightLegMuscles.QuadratusFemoris2;
    AnyFolder &mus157  = .RightLegMuscles.QuadratusFemoris3;
    AnyFolder &mus158  = .RightLegMuscles.QuadratusFemoris4;

    AnyFolder &mus159= Main.HumanModel.BodyModel.Trunk.MusclesSpineRight.PsoasMajor.PMT12I_TM;
    AnyFolder &mus160= Main.HumanModel.BodyModel.Trunk.MusclesSpineRight.PsoasMajor.PML1I_TM;
    AnyFolder &mus161= Main.HumanModel.BodyModel.Trunk.MusclesSpineRight.PsoasMajor.PML1T_TM;
    AnyFolder &mus162= Main.HumanModel.BodyModel.Trunk.MusclesSpineRight.PsoasMajor.PML2I_TM;
    AnyFolder &mus163= Main.HumanModel.BodyModel.Trunk.MusclesSpineRight.PsoasMajor.PML2T_TM;
    AnyFolder &mus164= Main.HumanModel.BodyModel.Trunk.MusclesSpineRight.PsoasMajor.PML3I_TM;
    AnyFolder &mus165= Main.HumanModel.BodyModel.Trunk.MusclesSpineRight.PsoasMajor.PML3T_TM;
    AnyFolder &mus166= Main.HumanModel.BodyModel.Trunk.MusclesSpineRight.PsoasMajor.PML4I_TM;
    AnyFolder &mus167= Main.HumanModel.BodyModel.Trunk.MusclesSpineRight.PsoasMajor.PML4T_TM;
    AnyFolder &mus168= Main.HumanModel.BodyModel.Trunk.MusclesSpineRight.PsoasMajor.PML5_TM;
    AnyFolder &mus169= Main.HumanModel.BodyModel.Trunk.MusclesSpineRight.PsoasMajor.PML5T_TM;


    AnyVec3 Mlocal=M*ref.Axes;
    AnyVar MHipX=Mlocal[0]/.W;
    AnyVar MHipY=Mlocal[1]/.W;
    AnyVar MHipZ=Mlocal[2]/.W;


  };
  //  #endif

};
